*Heading
** Job name: Job-1 Model name: Model-1
** Generated by: Abaqus/CAE 2023
*Preprint, echo=NO, model=NO, history=NO, contact=NO
**
** PARTS
**
*Part, name=Part-1
*Node
      1,           0.,           0.,           0.
      2,  0.300000012,           0.,           0.
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*Element, type=B31
  1,   1,   4
  2,   4,   5
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*Nset, nset=_PickedSet3, internal, generate
    1,  1001,     1
*Elset, elset=_PickedSet3, internal, generate
    1,  1000,     1
** Region: (Section-1:Picked), (Beam Orientation:Picked)
*Elset, elset=_I1, internal, generate
   1,  300,    1
** Section: Section-1  Profile: Profile-1
*Beam Section, elset=_I1, material=Material-1, temperature=GRADIENTS, section=RECT
1., 1.
0.,0.,-1.
** Region: (Section-1:Picked), (Beam Orientation:Picked)
*Elset, elset=_I2, internal, generate
  301,  1000,     1
** Section: Section-1  Profile: Profile-1
*Beam Section, elset=_I2, material=Material-1, temperature=GRADIENTS, section=RECT
1., 1.
0.,0.,-1.
*End Part
**
**
** ASSEMBLY
**
*Assembly, name=Assembly
**
*Instance, name=Part-1-1, part=Part-1
*End Instance
**
*Nset, nset=end-2, instance=Part-1-1
 3,
*Nset, nset=force_set, instance=Part-1-1
 2,
*Nset, nset=_PickedSet4, internal, instance=Part-1-1
 1,
*End Assembly
**
** MATERIALS
**
*Material, name=Material-1
*Density
1.,
*Elastic
1.,0.
**
** BOUNDARY CONDITIONS
**
** Name: BC-1 Type: 对称/反对称/完全固定
*Boundary
_PickedSet4, ENCASTRE
** Name: BC-2 Type: 对称/反对称/完全固定
*Boundary
end-2, ENCASTRE
** ----------------------------------------------------------------
**
** STEP: Step-1
**
*Step, name=Step-1, nlgeom=NO, inc=10000000
*Dynamic
1e-05,3.,1e-07
**
** LOADS
**
** Name: Load-1   Type: Concentrated force
*Cload
force_set, 1, 1.
force_set, 2, 0.
**
** OUTPUT REQUESTS
**
*Restart, write, frequency=0
**
** FIELD OUTPUT: F-Output-1
**
*Output, field, variable=PRESELECT, frequency=1
**
** HISTORY OUTPUT: H-Output-2
**
*Output, history, frequency=1
*Node Output, nset=force_set
COOR1, COOR2, COOR3, U1, U2, U3, UR1, UR2
UR3
**
** HISTORY OUTPUT: H-Output-1
**
*Output, history, variable=PRESELECT, frequency=1
*End Step
